*Heading
** Job name: BBC05 Model name: Model-1
** Generated by: Abaqus/CAE 2020
*Preprint, echo=NO, model=NO, history=NO, contact=NO
**
** PARTS
**
*Part, name=Part-1
*End Part
**
**
** ASSEMBLY
**
*Assembly, name=Assembly
**
*Instance, name=Part-1-1, part=Part-1
*Node
      1,          2.5,          10.
      2,          2.5,          30.
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*Element, type=CPS8
  1,    1,   13,  301,  108, 1354, 1355, 1356, 1357
  2,   13,   14,  302,  301, 1358, 1359, 1360, 1355
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*Nset, nset=Set-1, generate
    1,  3903,     1
*Elset, elset=Set-1, generate
    1,  1200,     1
*Orientation, name=Ori-1
1., 0., 0., 0., 1., 0.
3, 0.
** Section: Section-1
*Solid Section, elset=Set-1, orientation=Ori-1, material=UMMDp
1.,
*End Instance
**
*Nset, nset=Set-2, instance=Part-1-1
    1,    4,    5,    8,    9,   12
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*Elset, elset=Set-2, instance=Part-1-1, generate
    1,  1161,    40
*Nset, nset=Set-3, instance=Part-1-1
   10,   11,  244,  245,  246,  247
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*Elset, elset=Set-3, instance=Part-1-1, generate
  840,  1200,    40
*Nset, nset=Set-4, instance=Part-1-1
    2,    3,   52,   53,   54,   55
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*Elset, elset=Set-4, instance=Part-1-1, generate
  40,  400,   40
*Nset, nset=Set-5, instance=Part-1-1
    6,    7,  148,  149,  150,  151
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*Elset, elset=Set-5, instance=Part-1-1, generate
 440,  800,   40
*Nset, nset="_T-Datum csys-2", internal
Set-5,
*Transform, nset="_T-Datum csys-2"
-0.707106781186548, 0.707106781186548,           0., 0.707106781186548, 0.707106781186548,           0.
*End Assembly
**
** MATERIALS
**
*Material, name=UMMDp
*User Material, constants=19
 0, 240, 0.4, -4, 4,  21.56, 1.7, 0.2253
 0.3649, 0.4286, 0.399, 0.3687, 0.7637,  5, 6.25, 2.968
 79.54, 37.44, 0
 *Depvar
 19,
** ----------------------------------------------------------------
**
** STEP: Step-1
**
*Step, name=Step-1, nlgeom=NO, inc=10000
*Static, stabilize, factor=0.0002, allsdtol=0, continue=NO
0.01, 1., 1e-15, 0.1
**
** BOUNDARY CONDITIONS
**
** Name: A45 Type: Displacement/Rotation
*Boundary
Set-5, 2, 2, 15.
** Name: CD Type: Displacement/Rotation
*Boundary
Set-4, 2, 2, 15.
** Name: Fixed Type: Symmetry/Antisymmetry/Encastre
*Boundary
Set-2, ENCASTRE
** Name: MD Type: Displacement/Rotation
*Boundary
Set-3, 1, 1, 15.
**
** CONTROLS
**
*Controls, reset
*Controls, parameters=time incrementation
, , , , , , , 15, , ,
**
** OUTPUT REQUESTS
**
*Restart, write, frequency=0
**
** FIELD OUTPUT: F-Output-1
**
*Output, field, variable=PRESELECT
**
** HISTORY OUTPUT: H-Output-1
**
*Output, history, variable=PRESELECT
*End Step
